include common.ini

# system definition
pair_style eam
read_data min.data
pair_coeff * * Al_jnp.eam

variable xx equal ${box_size} / 2 * ${dx}
variable yy equal ${box_size} / 2 * ${dy}
variable zz equal ${box_size} / 2 * ${dz}

region plane_in  plane $(v_xx-1) v_yy v_zz  1 0 0  side in
region plane_out plane $(v_xx+1) v_yy v_zz  1 0 0  side out
region top_half  block INF INF  INF INF  v_zz INF

region plane_region intersect 3 plane_in plane_out top_half
delete_atoms region plane_region compress yes

# monitoring
thermo 100
thermo_style custom step temp pe ke etotal press

dump mydump all atom 50 dump.lammpstrj

# run
fix mynve all nve
fix mylgv all langevin 1.0 1.0 0.1 1337
timestep 0.005
run 3000
